// SBML level 2 version 4

function Hill_Positive(x, n, k)
  x^n/(k^n + x^n);
end

function Hill_Negative(k, n, x)
  k^n/(k^n + x^n);
end

model New_Model()

  // Compartments:
  compartment PKC = 1;

  // Species:
  species p47 in PKC = 1;
  species p20 in PKC = 1;
  species Ca2 in PKC = 1;
  species PDBu in PKC = 1;
  species hERG in PKC = 1;
  species EGFBound in PKC = 1;
  species ATP in PKC = 1;
  species _80K in PKC = 1;
  species Thymidine in PKC = 1;

  // Reactions:
  R1: p47 => PDBu; PKC*Hill_Positive(p47, R1_n, R1_k);
    R1_n = -3.12623; R1_k = 27.15907;
  R2: p20 => PDBu; PKC*Hill_Positive(p20, R2_n, R2_k);
    R2_n = -10.0486; R2_k = 72.4522;
  R3: Ca2 => PDBu; PKC*Hill_Positive(Ca2, R3_n, R3_k);
    R3_n = -4.99721; R3_k = 62.07302;
  R4: PDBu => Ca2; PKC*Hill_Positive(PDBu, R4_n, R4_k);
    R4_n = 1.051755; R4_k = 20.63276;
  R5: PDBu => hERG; PKC*Hill_Positive(PDBu, R5_n, R5_k);
    R5_n = -1.74668; R5_k = 31.23127;
  R6: PDBu => EGFBound; PKC*Hill_Positive(PDBu, R6_n, R6_k);
    R6_n = -2.52792; R6_k = 79.90729;
  R7: PDBu => ATP; PKC*Hill_Negative(R7_k, R7_n, PDBu);
    R7_k = 33.26842; R7_n = -1.14172;
  R8: PDBu => _80K; PKC*Hill_Negative(R8_k, R8_n, PDBu);
    R8_k = 26.60215; R8_n = -1.19819;
  R9: PDBu => Thymidine; PKC*Hill_Negative(R9_k, R9_n, PDBu);
    R9_k = 22.99827; R9_n = -0.8936;

  // Unit definitions:
  unit volume = 1e-3 litre;
  unit substance = 1e-3 mole;
end
